// SBML level 2 version 3

model Model_1()
  // Rodriguez-Caso2006_Polyamine_Metabolism
  // SBML creators: Armando Reyes-Palomares * , Carlos Rodríguez-Caso +, Raul Montañez * , Marta Cascante $, Francisca Sánchez-Jiménez * , Miguel A. Medina *
  // * ProCel Group, Department of Molecular Biology and Biochemistry, Faculty of Sciences, Campus de Teatinos, University of Malaga and CIBER de Enfermedades Raras (CIBER-ER). + Complex Systems Lab (ICREA-UPF), Barcelona Biomedical Research Park (PRBB-GRIB). $ Department of Biochemistry and Molecular Biology, Faculty of Biology, Universitat de Barcelona.
  // http://asp.uma.es
  // Metabolic modeling of polyamine metabolism in mammals.
  // Rodríguez-Caso,C et al.: J Biol Chem 2006 : 281:21799-812.
  // The model reproduces the dynamical behavior of the polyamine metabolism in mammals. In this model there are some additions and corrections to the publication. All perturbations and analysis have produced results very close to the published experiments. The model was successfully tested on CoPaSi v.4.4 (build 26).
  // Parameters not included in the publication:
  // 1. Parameters for SSAT kinetic constants:
  // KmAcCoA = 1.5 µM
  // KmCoA = 40 µM
  // 2. Parameters for equation MAT (table 1):
  // Vmax_MAT = 0.45 µM/min
  // Km_MAT = 41 µM
  // Ki_MET_MAT = 50 µM
  // 3. Erratum.: The corrected ODE for time-dependent variable Antz is:
  // KsANTZ*(1-1/(1+Keq*0.01*([D]+[S])))-KdANTZ*[Antz]
  // According to these modifications the new steady-state analysis results are:
  // Metabolites:
  // [P]= 104.681 µM
  // [D]= 76.7492 µM
  // [S]= 58.0135 µM
  // [SAM]= 52.327 µM
  // [A]= 0.0101962 µM
  // [aS]= 0.0245375 µM
  // [aD]= 0.832236 µM
  // Time-dependent global parameters:
  // [Antz] = 0.574038 µM
  // Vmaxodc = 1.28315 µM/min
  // Vmaxssat = 0.673814 µM/min
  // Vmaxsamdc = 0.36829 µM/min
  // To the extent possible under law, all copyright and related or neighbouring rights to this encoded model have been dedicated to the public domain worldwide. Please refer to CC0 Public Domain Dedication for more information.
  // In summary, you are entitled to use this encoded model in absolutely any manner you deem suitable, verbatim, or with modification, alone or embedded it in a larger context, redistribute it, commercially or not, in a restricted way or not.
  // To cite BioModels Database, please use: Li C, Donizelli M, Rodriguez N, Dharuri H, Endler L, Chelliah V, Li L, He E, Henry A, Stefan MI, Snoep JL, Hucka M, Le Novère N, Laibe C (2010) BioModels Database: An enhanced, curated and annotated resource for published quantitative kinetic models. BMC Syst Biol., 4:92.
  // biomodels.db:MODEL6812345601
  // biomodels.db:BIOMD0000000190
  // isDescribedBy pubmed:16709566
  // hasTaxon taxonomy:40674 taxonomy:9989
  // isVersionOf GO:0006595
  // hasProperty mamo:MAMO_0000046

  // Compartments:
  compartment cytosol = 1; cytosol is "Cytosol";  // GO:0005829

  // Species:
  species SAM in cytosol = 0.01; SAM is "S-adenosyl-L-methionine";  // CHEBI:15414 kegg.compound:C00019 CHEBI:59789
  species A in cytosol = 0.01; A is "S-adenosylmethioninamine";  // CHEBI:15625 kegg.compound:C01137
  species P in cytosol = 0.01; P is "Putrescine";  // CHEBI:17148 kegg.compound:C00134 CHEBI:326268
  species S in cytosol = 0.01; S is "Spermine";  // CHEBI:15746 kegg.compound:C00750 CHEBI:45725
  species D in cytosol = 0.01; D is "Spermidine";  // CHEBI:16610 kegg.compound:C00315 CHEBI:57834
  species aS in cytosol = 0.01; aS is "N1-Acetylspermine";  // CHEBI:17312 kegg.compound:C02567 CHEBI:58101
  species aD in cytosol = 0.01; aD is "N1-Acetylspermidine";  // CHEBI:22204 kegg.compound:C00612 CHEBI:17927 CHEBI:58324
  species $Met in cytosol = 50; Met is "Methionine";  // CHEBI:16643 kegg.compound:C00073 CHEBI:64558 CHEBI:16811
  species $ORN in cytosol = 300; ORN is "L-Ornithine";  // CHEBI:15729 kegg.compound:C00077 CHEBI:46911
  species $AcCoA in cytosol = 39.5; AcCoA is "Acetyl-CoA";  // CHEBI:15351 kegg.compound:C00024 CHEBI:57288
  species $CoA in cytosol = 160;  // CHEBI:15346 kegg.compound:C00010 CHEBI:48076 CHEBI:57287

  // Parameters:
  Vmaxodc = 1.279057 uM_min_1;
  Vmaxssat = 0.6772985 uM_min_1;
  Vmaxsamdc = 0.3674659 uM_min_1;
  Antz = 0.5745895 uM_min_1;
  Keq = 1 uM_1;
  Kdodc = 0.05 uM_1; Kdodc is "KdODC";
  Ksodc = 5 uM_min_2; Ksodc is "KsODC";
  Kdssat = 0.2 min_1; Kdssat is "KdSSAT";
  Ksssat = 0.001 uM_min_2; Ksssat is "KsSSAT";
  Kdsamdc = 0.02 min_1; Kdsamdc is "KdSAMDC";
  Kssamdc = 1 uM_min_2; Kssamdc is "KsSAMDC";
  Kdantz = 0.02 min_1; Kdantz is "KdANTZ";
  Ksantz = 0.02 uM_min_2; Ksantz is "KsANTZ";
  R = 0.004 min_1;
  C = 4.44 dimensionless;
  Kaccoa has min_1;
  Kcoa has min_1;

  // Assignment rules:
  Kaccoa := R;
  Kcoa := 3*R;

  // Rate rules:
  Vmaxodc' = Ksodc/(1 + Keq*(D + S)) - Kdodc*Antz*Vmaxodc;
  Vmaxssat' = Ksssat*(1 - 1/(1 + Keq*(D + S))) - Kdssat*(1/(1 + Keq*(D + S)))*Vmaxssat;
  Vmaxsamdc' = Kssamdc*(1/(1 + Keq*(D + S))) - Kdsamdc*Vmaxsamdc;
  Antz' = Ksantz*(1 - 1/(1 + Keq*0.01*(D + S))) - Kdantz*Antz;

  // Reactions:
  ODC: $ORN => P; cytosol*(Vmaxodc*ORN/(Kmodc*(1 + P/Kipodc) + ORN)); ODC is "Ornithine decarboxylase";  // isVersionOf ec-code:4.1.1.17 kegg.reaction:R00670 reactome:REACT_1211.3 rhea:28827
    Kipodc = 1300 uM; Kmodc = 60 uM;
  SAMdc: SAM => A; cytosol*(Vmaxsamdc/(1 + S/Kissamdc)*SAM/(Kmsamdc*(1 + Kapsamdc/P + A/Kiasamdc) + SAM)); SAMdc is "S-adenosylmethionine decarboxylase";  // modifiers: S, P; isVersionOf ec-code:4.1.1.50 kegg.reaction:R00178 rhea:15981
    Kapsamdc = 0.5 uM; Kiasamdc = 2.5 uM; Kissamdc = 500 uM; Kmsamdc = 50 uM;
  SSAT_for_S: S + $AcCoA => aS + $CoA; cytosol*(1/C*Vmaxssat*S*AcCoA/(SSAT_for_S_Kmsssat*(1 + D/SSAT_for_S_Kmdssat)*SSAT_for_S_Kmaccoassat*(1 + CoA/SSAT_for_S_Kmcoassat) + SSAT_for_S_Kmaccoassat*(1 + CoA/SSAT_for_S_Kmcoassat)*S + SSAT_for_S_Kmsssat*(1 + D/SSAT_for_S_Kmdssat)*AcCoA + S*AcCoA)); SSAT_for_S is "Spermidine/Spermine N1-acetyltransferase for S";  // modifiers: D; isVersionOf ec-code:2.3.1.57 kegg.reaction:R03910 rhea:33099 rhea:11116
    SSAT_for_S_Kmaccoassat = 1.5 uM; SSAT_for_S_Kmcoassat = 40 uM; SSAT_for_S_Kmdssat = 130 uM; SSAT_for_S_Kmsssat = 35 uM;
  SSAT_for_D: D + $AcCoA => aD + $CoA; cytosol*(Vmaxssat*D*AcCoA/(SSAT_for_D_Kmdssat*(1 + S/SSAT_for_D_Kmsssat)*SSAT_for_D_Kmaccoassat*(1 + CoA/SSAT_for_D_Kmcoassat) + SSAT_for_D_Kmaccoassat*(1 + CoA/SSAT_for_D_Kmcoassat)*D + SSAT_for_D_Kmdssat*(1 + S/SSAT_for_D_Kmsssat)*AcCoA + D*AcCoA)); SSAT_for_D is "Spermidine/spermine N1-acetyltransferase for D";  // modifiers: S; isVersionOf ec-code:2.3.1.57 kegg.reaction:R03910 rhea:33099 rhea:11116
    SSAT_for_D_Kmaccoassat = 1.5 uM; SSAT_for_D_Kmcoassat = 40 uM; SSAT_for_D_Kmdssat = 130 uM; SSAT_for_D_Kmsssat = 35 uM;
  PAO_for_aD: aD => P; cytosol*(PAO_for_aD_Vmpao*aD/(PAO_for_aD_Kmadpao*(1 + aD/PAO_for_aD_Kmadpao + aS/PAO_for_aD_Kmaspao + D/PAO_for_aD_Kmdpao + S/PAO_for_aD_Kmspao))); PAO_for_aD is "Polyamine oxidase for aD";  // modifiers: aS, D, S; isVersionOf ec-code:1.5.3.11 kegg.reaction:R03899 reactome:REACT_1548.3 rhea:16133
    PAO_for_aD_Kmadpao = 14 uM; PAO_for_aD_Kmaspao = 0.6 uM; PAO_for_aD_Kmdpao = 50 uM; PAO_for_aD_Kmspao = 15 uM; PAO_for_aD_Vmpao = 10.35 uM_min_1;
  PAO_for_aS: aS => D; cytosol*(PAO_for_aS_Vmpao*aS/(PAO_for_aS_Kmaspao*(1 + aD/PAO_for_aS_Kmadpao + aS/PAO_for_aS_Kmaspao + D/PAO_for_aS_Kmdpao + S/PAO_for_aS_Kmspao))); PAO_for_aS is "Polyamine oxidase for aS";  // modifiers: aD, S; isVersionOf ec-code:1.5.3.11 kegg.reaction:R03899 reactome:REACT_2231.4 rhea:25800
    PAO_for_aS_Kmadpao = 14 uM; PAO_for_aS_Kmaspao = 0.6 uM; PAO_for_aS_Kmdpao = 50 uM; PAO_for_aS_Kmspao = 15 uM; PAO_for_aS_Vmpao = 10.35 uM_min_1;
  SpdS: A + P => D; cytosol*(Vmspds*A*P/(Kiaspds*Kpspds*(1 + D/Kidspds) + Kpspds*A + KaSpds*(1 + D/Kidspds)*P + A*P)); SpdS is "Spermidine synthase";  // isVersionOf ec-code:2.5.1.16 kegg.reaction:R01920 rhea:12721
    KaSpds = 0.3 uM; Kiaspds = 0.8 uM; Kidspds = 100 uM; Kpspds = 40 uM; Vmspds = 10.95 uM_min_1;
  SpmS: A + D => S; cytosol*(Vmspms*A*D/(Kiaspms*Kdspms*(1 + S/Kisspms) + Kdspms*A + Kaspms*(1 + S/Kisspms)*D + A*D)); SpmS is "Spermine synthase";  // isVersionOf ec-code:2.5.1.22 kegg.reaction:R02869 rhea:19973 rhea:30515
    Kaspms = 0.1 uM; Kdspms = 60 uM; Kiaspms = 0.06 uM; Kisspms = 25 uM; Vmspms = 3.23 uM_min_1;
  MAT: $Met => SAM; cytosol*(Vmmat/(1 + Kmmat/Met*(1 + SAM/Kimetmat))); MAT is "Methionine adenosyltransferase";  // isVersionOf ec-code:2.5.1.6 kegg.reaction:R00177 rhea:42632 rhea:56520
    Kimetmat = 50 uM; Kmmat = 41 uM; Vmmat = 0.45 uM_min_1;
  VCoA: $AcCoA => $CoA; cytosol*Kcoa*AcCoA; VCoA is "VCOA";  // isVersionOf GO:0046356 rhea:15081 rhea:23176 rhea:20289
  VacCoA: $CoA => $AcCoA; cytosol*Kaccoa*CoA; VacCoA is "VACCOA";  // isVersionOf GO:0006085 rhea:15081 rhea:23176 rhea:20289
  P_efflux: P => ; cytosol*Kpefflux*P; P_efflux is "Putrescine efflux";  // isVersionOf GO:0009447 rhea:12436 rhea:34111 rhea:29995
    Kpefflux = 0.01 min_1;
  aD_efflux: aD => ; cytosol*Kadefflux*aD;  // rhea:25868 rhea:25972 rhea:28150 rhea:51900
    Kadefflux = 0.01 min_1;

  // Unit definitions:
  unit time = 60 second; time is "minute";
  unit substance = 1e-6 mole; substance is "µmole";
  unit uM_1 = litre / (1e-6 mole); uM_1 is "peruM";
  unit uM_min_1 = 1e-6 mole / (60 second * litre); uM_min_1 is "uMpermin";
  unit uM_1_min_1 = litre / (1e-6 mole * 60 second); uM_1_min_1 is "peruMpermin";
  unit uM_1_min_2 = litre / (1e-6 mole * (60 second)^2); uM_1_min_2 is "uM^(-1)min^(-2)";
  unit min_1 = 1 / (60 second); min_1 is "permin";
  unit uM = 1e-6 mole / litre; uM is "microM";
  unit min_uM_1 = 60 second * litre / (1e-6 mole); min_uM_1 is "minperuM";
  unit uM_min_2 = 1e-6 mole / (litre * (60 second)^2); uM_min_2 is "uM(min)^-2";
end
